log         				log.txt
units				metal
dimension			3
boundary        			p p p
atom_style			charge

read_data				4.data

# atom charges
set type 1 charge 2.4 # Si
set type 2 charge 1.8 # Al
set type 3 charge 1.2  # Mg
set type 4 charge 0.6 #Na
set type 5 charge -1.2 # O

group Si type 1
group Al type 2
group Mg type 3
group Na type 4
group O type 5

##################################################################
pair_style          buck/coul/long 10.0 10.0
kspace_style		ewald 1.0e-5

pair_coeff	    * * 0.00000000 1.000 0.00000000 # others
pair_coeff      1 5  13702.905 0.193817 54.681
pair_coeff      2 5  12201.417 0.195628 31.997
pair_coeff      3 5  7063.4907 0.210901 19.210
pair_coeff      4 5  4383.7555 0.243838 30.700
pair_coeff      5 5  2029.2204 0.343645 192.58

neighbor		               2.0 bin
neigh_modify 		every 1 delay 0 check yes
timestep			0.001       ## 1.0 fs, metal time unit is ps
##################################################################
# outputs
thermo 100
thermo_style custom step temp pe press lx density

# mixing2
minimize 1.0e-8 1.0e-8 10000 10000
reset_timestep	0
velocity all create 3000.0 5812775 dist gaussian         #initial temp 3000k
fix 1 all nvt temp 3000 3000 0.1
run 400000                                                                   #400ps
unfix 1

write_restart NVT3000K.rest
write_data NVT3000K.dat


# cooling   5k/ps
fix 1 all nvt temp 3000 300 0.1
run 540000                                                             #540ps
unfix 1
write_restart cooling.rest
write_data cooling.dat
# final relaxation
thermo_style 		custom step temp vol pe press lx density
thermo				100
fix 1 all npt temp 300 300 0.1 iso 0.0 0.0 1
run 200000                                                              #200ps
unfix 1
write_restart BeforeStatistical.rest
write_data  BeforeStatistical.dat

thermo_style 		custom step temp vol pe press lx density
thermo				100
fix 1 all nve
run 100000                                                             #100ps
unfix 1


# statistical average
thermo_style 		custom step temp vol pe press lx xlo xhi density
thermo				1000

compute msdSi Si msd com yes
compute msdAl Al msd com yes
compute msdMg Mg msd com yes
compute msdNa Na msd com yes
compute msdO O msd com yes

compute 			RDF all rdf 1000 1 5 2 5 3 5 4 5 5 5 1 1 2 2 3 3 4 4 1 2 1 3 1 4 2 3 2 4 3 4  #计算1-5号原子对5号原子的径向分布函数
fix 			2 all ave/time 1 1 1000 c_RDF[*] file RDF.profile mode vector
fix outMSD all ave/time 1000 1 1000 c_msdSi[4] c_msdAl[4] c_msdMg[4] c_msdNa[4] c_msdO[4] start 0 file MSD.average      #output msd with timestep
dump  1  all custom 1000 md.lammpstrj id type  x y z vx vy vz
dump  2  all atom 1000 VMDdata.NPT.lammpstrj
dump 3 all xyz 1000 final.xyz
dump_modify 3 element Si Al Mg Na O
dump 4 all custom 20000 elastic.txt.* id type x y z


fix 1 all nve
run 100000                                                 #100ps
unfix 1
unfix 2
unfix outMSD
undump 1
undump 2
undump 3
undump 4

write_restart end300K.rest
write_data end300K.dat
